<neuroml xmlns="http://www.neuroml.org/schema/neuroml2"  xmlns:xs="http://www.w3.org/2001/XMLSchema" xmlns:xsi="http://www.w3.org/2001/XMLSchema-instance" xsi:schemaLocation="http://www.neuroml.org/schema/neuroml2 https://raw.github.com/NeuroML/NeuroML2/development/Schemas/NeuroML2/NeuroML_v2beta5.xsd" id="Example5">
    <notes>Network read in from BBP connectome: /home/padraig/git/NetworkShorthand/proposal/test_files/cons_locs_pathways_mc0_Column.h5</notes>
	<network id="Example">
        <population id="CellGroupA" size="27" component="ecneuron" type="populationList">
		<instance id="0">
		  <location x="-100" y=" -100" z=" 100" />
		</instance>
		<instance id="1">
		  <location x="-80" y=" -100" z=" 100" />
		</instance>
		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0
        </population>

        <population id="CellGroupB" size="27" component="valneuron" type="populationList">
	      <instance id="0">
		<location x="-80" y=" -80" z=" -100" />
	      </instance>
	      <instance id="1">
		<location x="-40" y=" -80" z=" -100" />
	      </instance>
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        </population>

        <population id="CellGroupC" size="1" component="multifire_inputneuron" type="populationList">
                <instance id="0">
                    <location x="100" y="100" z="250"/>
                </instance>
        </population>

        <projection name="NetConn_1" presynapticPopulation="CellGroupA" postsynapticPopulation="CellGroupB">
            <synapse_props synapse_type="DoubExpSyn" internal_delay="5" weight="1" threshold="-20"/>
                <connectionWD id='0' preCellId='1/' postCellId='0/'/>
                <connectionWD id='1' preCellId='1/' postCellId='3/'/>
                <connectionWD id='2' preCellId='5/' postCellId='6/'/>
                <connectionWD id='3' preCellId='8/' postCellId='6/'/>
                <connectionWD id='4' preCellId='7/' postCellId='8/'/>
                <connectionWD id='5' preCellId='8/' postCellId='10/'/>
                <connectionWD id='6' preCellId='10/' postCellId='9/'/>
                <connectionWD id='7' preCellId='9/' postCellId='11/'/>
                <connectionWD id='8' preCellId='10/' postCellId='12/'/>
                <connectionWD id='9' preCellId='14/' postCellId='13/'/>
                <connectionWD id='10' preCellId='16/' postCellId='14/'/>
                <connectionWD id='11' preCellId='15/' postCellId='16/'/>
                <connectionWD id='12' preCellId='21/' postCellId='0/'/>
                <connectionWD id='13' preCellId='20/' postCellId='21/'/>
                <connectionWD id='14' preCellId='20/' postCellId='22/'/>
                <connectionWD id='15' preCellId='24/' postCellId='3/'/>
                <connectionWD id='16' preCellId='24/' postCellId='22/'/>
                <connectionWD id='17' preCellId='24/' postCellId='23/'/>
                <connectionWD id='18' preCellId='25/' postCellId='6/'/>
                <connectionWD id='19' preCellId='24/' postCellId='25/'/>
                <connectionWD id='20' preCellId='7/' postCellId='26/'/>
                <connectionWD id='21' preCellId='26/' postCellId='25/'/>
        </projection>
        <projection name="NetConn_2" presynapticPopulation="CellGroupC" postsynapticPopulation="CellGroupA">
            <synapse_props synapse_type="DoubExpSyn" internal_delay="5" weight="1" threshold="-20"/>
                <connectionWD id="0" preCellId="0/" postCellId="1/"/>
                <connectionWD id="1" preCellId="0/" postCellId="2/"/>
                <connectionWD id="2" preCellId="0/" postCellId="3/"/>
        </projection>
        <projection name="test" presynapticPopulation="CellGroupB" postsynapticPopulation="CellGroupA">
            <synapse_props synapse_type="DoubExpSyn" internal_delay="5" weight="1" threshold="-20"/>
            <connectivity_pattern>
                <fixed_probability probability="0.01"/>
            </connectivity_pattern>
        </projection>
</network>
</neuroml>
