<?xml version="1.0"?>
<neuroml xmlns="http://www.neuroml.org/schema/neuroml2" xmlns:xsi="http://www.w3.org/2001/XMLSchema-instance" xsi:schemaLocation="http://www.neuroml.org/schema/neuroml2 https://raw.githubusercontent.com/NeuroML/NeuroML2/development/Schemas/NeuroML2/NeuroML_v2beta4.xsd" id="honeyALmodel">
    <notes>
Simulation of the bee antennal lobe
    </notes>

       <network id="honeyALmodel">

       <population id="ORN" component="HONEYORN" size="450">
              <instance id="0">
                  <location x="8.78969" y="27.1722" z="11.6284"/>
              </instance>
              <instance id="1">
                  <location x="9.96163" y="25.6723" z="4.79485"/>
              </instance>
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       </population>

       <population id="PN" component="HONEYALNEURON" size="150">
              <instance id="450">
                  <location x="12.4887" y="8.15736" z="3.95726"/>
              </instance>
              <instance id="451">
                  <location x="12.6637" y="7.50066" z="3.79149"/>
              </instance>
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       </population>

       <population id="hLN" component="HONEYALNEURON" size="30">
              <instance id="600">
                  <location x="12.4569" y="7.7584" z="4.02814"/>
              </instance>
              <instance id="601">
                  <location x="11.1844" y="7.24733" z="2.27577"/>
              </instance>
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       </population>

       <projection id="ORNPN" presynapticPopulation="ORN" postsynapticPopulation="PN" synapse="ABSYNAPSEEXPDECAY">
<connection id="0" preCellId="../ORN/0/HONEYORN" postCellId="../PN/450/HONEYALNEURON"/>
<connection id="1" preCellId="../ORN/1/HONEYORN" postCellId="../PN/450/HONEYALNEURON"/>
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      </projection>
       </network>

</neuroml>
